# line_1
x_0 := 14
x_1 := 16
y_0 := 10
y_1 := 11
region_0_0000 := (x_0 ≥ 8 and x_0 ≤ 18) and (y_0 ≤ 12 and y_0 ≥ 6) → 1
region_1_0000 := (x_1 ≥ 8 and x_1 ≤ 18) and (y_1 ≤ 12 and y_1 ≥ 6) → 1
trivially_accepted := region_0_0000 and region_1_0000 → 1
