q_x := 0.88
q_y := -1.8
w := 800
h := 600
q_x_screen := (q_x + 1)*(w/2) → 752.0
q_y_screen := (q_y + 5)*(h/1.5) → 1280.0
p_0x := 0
p_0y := -4.47
p_0z := 0
p_0x_screen := (p_0x + 1)*(w/2) → 400
p_0y_screen := (p_0y + 5)*(h/1.5) → 212.0
p_1x := 5.02
p_1y := 0
p_1z := 0
p_1x_screen := (p_1x + 1)*(w/2) → 2408.0
p_1y_screen := (p_1y + 5)*(h/1.5) → 2000.0
p_2x := 0
p_2y := 0
p_2z := 1.69
p_2x_screen := (p_2x + 1)*(w/2) → 400
p_2y_screen := (p_1y + 5)*(h/1.5) → 2000.0
A := abs(1/2*((p_2x - p_0x)*(p_1y - p_0y) - (p_1x - p_0x)*(p_2y - p_0y))) → 11.2197
A' := 1/2*((p_2x_screen - p_0x_screen)*(p_1y_screen - p_0y_screen) - (p_1x_screen - p_0x_screen)*(p_2y_screen - p_0y_screen)) → -1795152.0
A_u := abs(1/2*((p_2x - p_0x)*(q_y - p_0y) - (p_2y - p_0y)*(q_x - p_0x))) → 1.9668
A'_u := 1/2*((p_2x_screen - p_0x_screen)*(q_y_screen - p_0y_screen) - (p_2y_screen - p_0y_screen)*(q_x_screen - p_0x_screen)) → -314688.0
A_v := abs(1/2*((q_x - p_0x)*(p_1y - p_0y) - (q_y - p_0y)*(p_1x - p_0x))) → 4.7349
A'_v := 1/2*((q_x_screen - p_0x_screen)*(p_1y_screen - p_0y_screen) - (q_y_screen - p_0y_screen)*(p_1x_screen - p_0x_screen)) → -757584.0
u := A_u/A → 0.175298804781
u' := A'_u/A' → 0.175298804781
v := A_v/A → 0.422016631461
v' := A'_v/A' → 0.422016631461
w := 1 - u - v → 0.402684563758
w' := 1 - u' - v' → 0.402684563758
q_z := w*p_0z + u*p_1z + v*p_2z → 0.713208107169
q'_z := w'*p_0z + u'*p_1z + v'*p_2z → 0.713208107169
