orig := [-4.85983; 4.8399; -6.78625]
point_ijk := [2; 1.5; 3]
i := [-4.0134; 4.9285; -7.3292] - orig → [0.84643; 0.0886; -0.54295]
j := [-4.934; 5.8399; -6.7387] - orig → [-0.07417; 1.0; 0.04755]
k := [-4.31607; 4.8399; -5.93856] - orig → [0.54376; 0.0; 0.84769]
i*2 + j*1.5 + k*3 + orig → [-1.646945; 6.5171; -5.257755]
M := [i[0], j[0], k[0], orig[0]; i[1], j[1], k[1], orig[1]; i[2], j[2], k[2], orig[2]; 0, 0, 0, 1]
point_ijk' := [point_ijk[0]; point_ijk[1]; point_ijk[2]; 1] → [2; 1.5; 3; 1]
M*point_ijk' → [-1.646945; 6.5171; -5.257755; 1.0]
