degrad := π/180
cam_yaw := 106.9688*degrad → 1.86695775691  # На основе реальной позиции камеры
cam_pitch := 109.7624*degrad → 1.91571527489
cam_yaw := 106.7194*degrad → 1.86260490575  # После ручного смещения в начало координат
cam_pos := [-6; 4; 2]
cam_pitch := 109.7616*degrad → 1.91570131226
forward := [sin(cam_pitch)*cos(cam_yaw); cos(cam_pitch); -sin(cam_pitch)*sin(cam_yaw)] → [-0.270742361742; -0.338107259872; -0.901322392033]
cam_pos + forward → [-6.27074236174; 3.66189274013; 1.09867760797]
forward := -forward
M_trans := [1, 0, 0, -cam_pos[0]; 0, 1, 0, -cam_pos[1]; 0, 0, 1, -cam_pos[2]; 0, 0, 0, 1]
3*cos(13*π/180) - 2*sin(13*π/180) float → 2.47320808567
3*sin(13*π/180) + 2*cos(13*π/180) float → 2.6235932926
ϕ := -(cam_yaw - 90*π/180) → -0.291808578958
ϕ' := -16.7194*π/180 → -0.291808578958
M_rot_y_yaw := [cos(ϕ), 0, -sin(ϕ), 0; 0, 1, 0, 0; sin(ϕ), 0, cos(ϕ), 0; 0, 0, 0, 1]
θ := cam_pitch - 90*π/180 → 0.344904985462  # Истинный угол
# Подогнанный под установленный вручную угол в GeoGebra
θ' := 19.7616*π/180 → 0.344904985462
M_rot_x_pitch := [1, 0, 0, 0; 0, cos(θ), sin(θ), 0; 0, -sin(θ), cos(θ), 0; 0, 0, 0, 1]
cube_verts := [
    -8.3617, -7.1599, -8.3617, -7.1599, -9.7393, -8.5375, -9.7393, -8.5375;
    0, 0, 1.8282, 1.8282, 0, 0, 1.8282, 1.8282;
    -5.6527, -7.0303, -5.6527, -7.0303, -6.8546, -8.2322, -6.8546, -8.2322;
    1, 1, 1, 1, 1, 1, 1, 1
]
cube_trans_0 := M_trans*cube_verts → [
    -2.3617, -1.1599, -2.3617, -1.1599, -3.7393, -2.5375, -3.7393, -2.5375;
    -4.0, -4.0, -2.1718, -2.1718, -4.0, -4.0, -2.1718, -2.1718;
    -7.6527, -9.0303, -7.6527, -9.0303, -8.8546, -10.2322, -8.8546, -10.2322;
    1.0, 1.0, 1.0, 1.0, 1.0, 1.0, 1.0, 1.0
]
cube_trans_1 := M_rot_y_yaw*cube_trans_0 → [
    -4.46342505946, -3.70874558729, -4.46342505946, -3.70874558729, -6.12855559488, -5.37387612271, -6.12855559488, -5.37387612271;
    -4.0, -4.0, -2.1718, -2.1718, -4.0, -4.0, -2.1718, -2.1718;
    -6.6497579594, -8.31485972634, -6.6497579594, -8.31485972634, -7.40453320409, -9.06963497103, -7.40453320409, -9.06963497103;
    1.0, 1.0, 1.0, 1.0, 1.0, 1.0, 1.0, 1.0
]
M_rot_x_pitch*cube_trans_1 → [
    -4.46342505946, -3.70874558729, -4.46342505946, -3.70874558729, -6.12855559488, -5.37387612271, -6.12855559488, -5.37387612271;
    -6.0127617703, -6.57574476613, -4.29222888897, -4.85521188479, -6.2679567601, -6.83093975593, -4.54742387877, -5.1104068746;
    -4.9057085943, -6.4727484919, -5.5238362868, -7.0908761844, -5.61603329975, -7.18307319735, -6.23416099225, -7.80120088985;
    1.0, 1.0, 1.0, 1.0, 1.0, 1.0, 1.0, 1.0
]
# Финальный вид видовой матрицы для перехода в пространство камеры
M_view := M_rot_x_pitch*M_rot_y_yaw*M_trans → [
    0.95772514143, 0.0, 0.287684816201, 5.17098121618;
    -0.0972683249126, 0.94110758196, 0.32381382328, -4.99566792387;
    -0.270742361742, -0.338107259872, 0.901322392033, -2.07466991503;
    0.0, 0.0, 0.0, 1.0
]
M_view*cube_verts → [
    -4.46342505946, -3.70874558729, -4.46342505946, -3.70874558729, -6.12855559488, -5.37387612271, -6.12855559488, -5.37387612271;
    -6.0127617703, -6.57574476613, -4.29222888897, -4.85521188479, -6.2679567601, -6.83093975593, -4.54742387877, -5.1104068746;
    -4.9057085943, -6.4727484919, -5.5238362868, -7.0908761844, -5.61603329975, -7.18307319735, -6.23416099225, -7.80120088985;
    1.0, 1.0, 1.0, 1.0, 1.0, 1.0, 1.0, 1.0
]
# Та же матрица, но заданная через базисные вектора пространства камеры
n := forward/|forward| → [0.270742361742; 0.338107259872; 0.901322392033]
v := ([0; 1; 0] - ([0, 1, 0]*forward)*forward)/|[0; 1; 0] - ([0, 1, 0]*forward)*forward| → [-0.0972683249126; 0.94110758196; -0.32381382328]
u := v×n/|v×n| → [0.95772514143; 0.864480480507*10^-23; -0.287684816201]
R := [u[0], u[1], u[2], 0; v[0], v[1], v[2], 0; n[0], n[1], n[2], 0; 0, 0, 0, 1] → [
    0.95772514143, 0.864480480507*10^-23, -0.287684816201, 0;
    -0.0972683249126, 0.94110758196, -0.32381382328, 0;
    0.270742361742, 0.338107259872, 0.901322392033, 0;
    0, 0, 0, 1
]
M_RT := R*M_trans → [
    0.95772514143, 0.864480480507*10^-23, -0.287684816201, 6.32172048098;
    -0.0972683249126, 0.94110758196, -0.32381382328, -3.70041263075;
    0.270742361742, 0.338107259872, 0.901322392033, -1.53061965311;
    0.0, 0.0, 0.0, 1.0
]
M_RT*cube_verts → [
    -0.0602938735729, 1.4870148042, -0.0602938735729, 1.4870148042, -1.03388764781, 0.513421029955, -1.03388764781, 0.513421029955;
    -1.05666167948, -0.727472829411, 0.663871201858, 0.993060051928, -0.533473000882, -0.204284150812, 1.18705988046, 1.51624873053;
    -8.88939114473, -9.80567470165, -8.27126345223, -9.18754700915, -10.3456652052, -11.2619487622, -9.72753751275, -10.6438210697;
    1.0, 1.0, 1.0, 1.0, 1.0, 1.0, 1.0, 1.0
]
