degrad := π/180
cam_yaw := 106.9688*degrad → 1.86695775691
cam_pos := [-6; 4; -2]
cam_pitch := 109.7624*degrad → 1.91571527489
forward := [sin(cam_pitch)*cos(cam_yaw); cos(cam_pitch); sin(cam_pitch)*sin(cam_yaw)] → [-0.274661728834; -0.33812040018; 0.90013084032]
cam_pos + forward → [-6.27466172883; 3.66187959982; -1.09986915968]
forward := forward/|forward| → [-0.274661728834; -0.33812040018; 0.90013084032]
M_trans := [1, 0, 0, -cam_pos[0]; 0, 1, 0, -cam_pos[1]; 0, 0, 1, -cam_pos[2]; 0, 0, 0, 1]
3*cos(13*π/180) - 2*sin(13*π/180) float → 2.47320808567
3*sin(13*π/180) + 2*cos(13*π/180) float → 2.6235932926
ϕ := -(cam_yaw - 90*π/180) → -0.296161430112
ϕ' := -16.7194*π/180 → -0.291808578958
M_rot_y_yaw := [cos(ϕ), 0, -sin(ϕ), 0; 0, 1, 0, 0; sin(ϕ), 0, cos(ϕ), 0; 0, 0, 0, 1]
θ := cam_pitch - 90*π/180 → 0.344918948096  # Истинный угол
# Подогнанный под установленный вручную угол в GeoGebra
θ' := 19.7616*π/180 → 0.344904985462
M_rot_x_pitch := [1, 0, 0, 0; 0, cos(θ), sin(θ), 0; 0, -sin(θ), cos(θ), 0; 0, 0, 0, 1]
cube_verts := [
    -8.3617, -7.1599, -8.3617, -7.1599, -9.7393, -8.5375, -9.7393, -8.5375;
    0, 0, 1.8282, 1.8282, 0, 0, 1.8282, 1.8282;
    5.6527, 7.0303, 5.6527, 7.0303, 6.8546, 8.2322, 6.8546, 8.2322;
    1, 1, 1, 1, 1, 1, 1, 1
]
cube_trans_0 := M_trans*cube_verts → [
    -2.3617, -1.1599, -2.3617, -1.1599, -3.7393, -2.5375, -3.7393, -2.5375;
    -4.0, -4.0, -2.1718, -2.1718, -4.0, -4.0, -2.1718, -2.1718;
    7.6527, 9.0303, 7.6527, 9.0303, 8.8546, 10.2322, 8.8546, 10.2322;
    1.0, 1.0, 1.0, 1.0, 1.0, 1.0, 1.0, 1.0
]
cube_trans_1 := M_rot_y_yaw*cube_trans_0 → [
    -0.0254331320472, 1.5260989077, -0.0254331320472, 1.5260989077, -0.992282082833, 0.559249956914, -0.992282082833, 0.559249956914;
    -4.0, -4.0, -2.1718, -2.1718, -4.0, -4.0, -2.1718, -2.1718;
    8.00879499899, 8.97567313486, 8.00879499899, 8.97567313486, 9.56042268512, 10.527300821, 9.56042268512, 10.527300821;
    1.0, 1.0, 1.0, 1.0, 1.0, 1.0, 1.0, 1.0
]
M_rot_x_pitch*cube_trans_1 → [
    -0.0254331320472, 1.5260989077, -0.0254331320472, 1.5260989077, -0.992282082833, 0.559249956914, -0.992282082833, 0.559249956914;
    -1.05647447398, -0.729553251756, 0.664049776496, 0.990970998724, -0.531837499819, -0.204916277591, 1.18868675066, 1.51560797289;
    8.88958148743, 9.79951326734, 8.27142977182, 9.18136155173, 10.3498227421, 11.259754522, 9.73167102644, 10.6416028064;
    1.0, 1.0, 1.0, 1.0, 1.0, 1.0, 1.0, 1.0
]
# Финальный вид видовой матрицы для перехода в пространство камеры
M_view := M_rot_x_pitch*M_rot_y_yaw*M_trans → [
    0.956463823055, 0.0, 0.291850912601, 6.32248476354;
    -0.0986807473616, 0.941102861, 0.323399930609, -3.70969606695;
    -0.274661728834, -0.33812040018, 0.90013084032, 1.50477290835;
    0.0, 0.0, 0.0, 1.0
]
M_view*cube_verts → [
    -0.0254331320472, 1.5260989077, -0.0254331320472, 1.5260989077, -0.992282082833, 0.559249956914, -0.992282082833, 0.559249956914;
    -1.05647447398, -0.729553251756, 0.664049776496, 0.990970998724, -0.531837499819, -0.204916277591, 1.18868675066, 1.51560797289;
    8.88958148743, 9.79951326734, 8.27142977182, 9.18136155173, 10.3498227421, 11.259754522, 9.73167102644, 10.6416028064;
    1.0, 1.0, 1.0, 1.0, 1.0, 1.0, 1.0, 1.0
]
# Та же матрица, но заданная через базисные вектора пространства камеры
n := forward/|forward| → [-0.274661728834; -0.33812040018; 0.90013084032]
v := ([0; 1; 0] - ([0, 1, 0]*forward)*forward)/|[0; 1; 0] - ([0, 1, 0]*forward)*forward| → [-0.0986807473616; 0.941102861; 0.323399930609]
u := v×n/|v×n| → [0.956463823055; -(0.103194366*10^-22); 0.291850912601]
R := [u[0], u[1], u[2], 0; v[0], v[1], v[2], 0; n[0], n[1], n[2], 0; 0, 0, 0, 1] → [
    0.956463823055, -(0.103194366*10^-22), 0.291850912601, 0;
    -0.0986807473616, 0.941102861, 0.323399930609, 0;
    -0.274661728834, -0.33812040018, 0.90013084032, 0;
    0, 0, 0, 1
]
M_RT := R*M_trans → [
    0.956463823055, -(0.103194366*10^-22), 0.291850912601, 6.32248476354;
    -0.0986807473616, 0.941102861, 0.323399930609, -3.70969606695;
    -0.274661728834, -0.33812040018, 0.90013084032, 1.50477290835;
    0.0, 0.0, 0.0, 1.0
]
M_RT*cube_verts → [
    -0.0254331320472, 1.5260989077, -0.0254331320472, 1.5260989077, -0.992282082833, 0.559249956914, -0.992282082833, 0.559249956914;
    -1.05647447398, -0.729553251756, 0.664049776496, 0.990970998724, -0.531837499819, -0.204916277591, 1.18868675066, 1.51560797289;
    8.88958148743, 9.79951326734, 8.27142977182, 9.18136155173, 10.3498227421, 11.259754522, 9.73167102644, 10.6416028064;
    1.0, 1.0, 1.0, 1.0, 1.0, 1.0, 1.0, 1.0
]
