A := [-1; 2; -3]
B := [-0.5; 1.5; -0.5]
C := [-2; 0; 0]
near := -1
# В плоcкоcти XZ | В плоcкоcти XZ
slope_xy := A[2]/(A[0] - B[0]) → 6.0
slope_xy := A[2]/(C[0] - A[0]) → 3
AB_z := near → -1
AB_dx := (near - B[2])/dx == slope_xy solve, dx → -0.166666666667
AC_z := near → -1
AC_dx := (near - C[2])/dx == slope_xy solve, dx → -1/3
AB_x := B[0] + AB_dx → -0.666666666667
AC_x := C[0] - AC_dx float → -1.66666666667
# В плоcкоcти ZY | В плоcкоcти ZY
slope_zy := (A[2] - B[2])/(A[1] - B[1]) → -5.0
slope_zy := (A[2] - C[2])/(A[1] - C[1]) float → -1.5
AB_dy := (near - B[2])/dy == slope_zy solve, dy → 0.333333333333
AC_dy := (near - C[2])/dy == slope_zy solve, dy, float → 0.666666666667
AB_y := B[1] + AB_dy → 1.83333333333
AC_y := C[1] + AC_dy → 0.666666666667
AB := [AB_x; AB_y; AB_z] → [-0.666666666667; 1.83333333333; -1]
AC := [AC_x; AC_y; AC_z] → [-1.66666666667; 0.666666666667; -1]
