A := [-1; 2; -3]
B := [-0.5; 1.5; -0.5]
C := [-2; 0; 0]
near := -1
p_0(t) := A + (B - A)*t  # Точка на отрезке из A в B
p_1(t) := A + (C - A)*t  # Точка на отрезке из A в C
p_0(0) == A → 1
p_0(1) == B → 1
p_1(0) == A → 1
p_1(1) == C → 1
p_0x(t) := A[0] + (B[0] - A[0])*t
p_1x(t) := A[0] + (C[0] - A[0])*t
p_0y(t) := A[1] + (B[1] - A[1])*t
p_1y(t) := A[1] + (C[1] - A[1])*t
p_0z(t) := A[2] + (B[2] - A[2])*t
p_1z(t) := A[2] + (C[2] - A[2])*t
# Фиксируем z, тогда однозначно определяется параметр t: | Фиксируем z, тогда однозначно определяется параметр t:
t_0 := A[2] + (B[2] - A[2])*t == near solve, t → 0.8
t_1 := A[2] + (C[2] - A[2])*t == near solve, t, float → 0.666666666667
# А параметр t однозначно определяет компоненты x и y: | А параметр t однозначно определяет компоненты x и y:
p_0x(t_0) → -0.6
p_0y(t_0) → 1.6
p_1x(t_1) float → -1.66666666667
p_0y(t_1) → 1.66666666667
# Ну и в целом определяет точку пересечения с ближней плоскостью:
# Ну и в целом определяет точку пересечения с ближней плоскостью:
p_0(t_0) → [-0.6; 1.6; -1.0]
p_1(t_1) → [-1.66666666667; 0.666666666667; -1]
