fov := 45*π/180 float → 0.785398163397
fov_half := fov/2 → 0.392699081699
r := 800/600 float → 1.33333333333
d := 1/d == tan(fov_half) solve, d → 2.41421356237
z_coord := -0.7231 - d
x_lim/z_coord == r/d solve, x_lim → -1.73269043594
y_lim/z_coord == 1/d solve, y_lim → -1.29951782695
