# Куллинг по горизонтали
w := 1024
h := 768
ratio := w/h float → 1.33333333333
vert_fov_half_rad := 45/2*(π/180) float → 0.392699081699
proj_plane_h_half := 1
proj_plane_w_half := ratio → 1.33333333333
# Расстояние от проективной плоскости до точки схода
d := proj_plane_h_half/d == tan(ver_fov_half_rad) solve, d → 1/tan(ver_fov_half_rad)
tan_horiz_fov_half := proj_plane_w_half/d → 1.33333333333*tan(ver_fov_half_rad)
horiz_fov_half_rad := atan(tan_horiz_fov_half) → atan(1.33333333333*tan(ver_fov_half_rad))
horiz_fov_half_deg := horiz_fov_half_rad*180/π → 57.2957795131*atan(1.33333333333*tan(ver_fov_half_rad))
# Зная коэффициент наклона мы теперь для любой координаты z можем определить границу боковой плоскости видимого объема.
# То есть, имея вершину, мы по ее z-координате (в пространстве камеры) определяем, находится ли она в пределах боковых плоскостей отсечения.
horiz_line_k := tan_horiz_fov_half float → 1.33333333333*tan(ver_fov_half_rad)
# Те же соображения для вертикальных плоскостей видимого объема, но гораздо проще, поскольку вертикальный fov задан изначально
vert_line_k := tan(vert_fov_half_rad) → 0.414213562373
