left := 0
right := 6  # Вертикальные границы окна
bottom := 0
top := 4  # Горизонтальные границы окна
x_1 := 2
x_2 := 5  # Точка A
y_1 := -2
y_2 := 7  # Точка B
slope := (y_2 - y_1)/(x_2 - x_1) → 3
x_1 > left → 1
x_1 < right → 1
y_1 < top → 1
y_1 > bottom → 0
bottom - y_1 → 2
y_1' := bottom → 0
x_1' := (bottom - y_1)/x_1' == slope solve, x_1', float → 0.666666666667
x_1' := x_1 + x_1' → 2.66666666667
# Параметрическая форма
Δx := x_2 - x_1 → 3
Δy := y_2 - y_1 → 9
f_x(u) := x_1 + Δx*u
f_y(u) := y_1 + Δy*u
