x_0 := 2.14715
x_1 := 3.64715
x_0_int := round(x_0) → 2
x_1_int := round(x_1) → 4
y_0 := 0.47057
y_1 := 0.47057
y_0_int := round(y_0) → 0
y_1_int := round(y_1) → 0
dy := y_1_int - y_0_int → 0
dx := x_1_int - x_0_int → 2
(|dy| ≤ |dx|) and (x_1_int > x_0_int) → 1
(|dy| > |dx|) and (y_1_int > y_0_int) → 0
slope := dy/dx float → 0.0
x_0 := 1.81549
x_1 := 3.62763
x_0_int := round(x_0) → 2
x_1_int := round(x_1) → 4
y_0 := 1.02138
y_1 := 1.65096
y_0_int := round(y_0) → 1
y_1_int := round(y_1) → 2
dy := y_1_int - y_0_int → 1
dx := x_1_int - x_0_int → 2
(|dy| ≤ |dx|) and (x_1_int > x_0_int) → 1
(|dy| > |dx|) and (y_1_int > y_0_int) → 0
slope := dy/dx float → 0.5
x_0 := 0.94892
x_1 := 8.55611
x_0_int := round(x_0) → 1
x_1_int := round(x_1) → 9
y_0 := 2.07485
y_1 := 17.03125
y_0_int := round(y_0) → 2
y_1_int := round(y_1) → 17
dy := y_1_int - y_0_int → 15
dx := x_1_int - x_0_int → 8
(|dy| ≤ |dx|) and (x_1_int > x_0_int) → 0
(|dy| > |dx|) and (y_1_int > y_0_int) → 1  # Линия второго класса - инкремент по Y
slope := dy/dx float → 1.875
slope' := dx/dy float → 0.533333333333
