w := 800
h := 600
r := w/h float → 1.33333333333
# Для удобства мы выбираем такую проективную плоскость, в которой при заданном вертикальном FOV полувысота проективного окна будет равна 1 (высота=2). Эта плоскость будет находиться на расстоянии d от начала координат (в пространстве камеры).
proj_win_h_half := 1
proj_win_w_half := r → 1.33333333333
fov_v := 45*(π/180) float → 0.785398163397
d := 1/d == tan(fov_v/2) solve, d → 2.41421356237
half_tan_fov_h := proj_win_w_half/d == half_tan_fov_h solve, half_tan_fov_h → 0.552284749831
fov_h := 2*atan(half_tan_fov_h) → 1.00919128997
# Вершины истинного сегмента
v_0 := [0.327694684; -0.544639051; -3.22799969; 1]
v_1 := [-1.63847339; 2.72319531; -7.86000156; 1]
# Итоговая матрица перспективной проекции
n := 0.1
f := 10
A := f/(f - n)
B := -n*f/(f - n)
M_proj := [1/(r*tan(fov_v/2)), 0, 0, 0; 0, 1/tan(fov_v/2), 0, 0; 0, 0, -A, B; 0, 0, -1, 0]
v_0_clip := M_proj*v_0 → [0.593343712823; -1.31487498352; 3.15959564646; 3.22799969]
v_0_ndc := v_0_clip/v_0_clip[3] → [0.183811576767; -0.407334296715; 0.978809154243; 1.0]
v_1_clip := M_proj*v_1 → [-2.96671850979; 6.57437505039; 7.83838541414; 7.86000156]
v_1_ndc := v_1_clip/v_1_clip[3] → [-0.377445028114; 0.836434318773; 0.997249854762; 1.0]
# Переводим вершины в экранное пространство
B := (w - 1)/2
A := B
D := (h - 1)/2
C := -(h - 1)/2
M_viewport := [A, 0, 0, B; 0, C, 0, D; 0, 0, 1, 0; 0, 0, 0, 1]
v_0_screen := M_viewport*v_0_ndc → [472.932724918; 421.496621866; 0.978809154243; 1.0]
v_1_screen := M_viewport*v_1_ndc → [248.710711268; 48.9879215275; 0.997249854762; 1.0]
