A := [1, 2, 3; 4, 5, 6; 7, 8, 9; 0, 1, 2]
B := [1, 4, 7, 0; 2, 5, 8, 1; 3, 6, 9, 2]
C := [1, 2, 3, 4; 5, 6, 7, 8; 9, 0, 1, 2; 3, 4, 5, 6]
C_AB := A*B → [14, 32, 50, 8; 32, 77, 122, 17; 50, 122, 194, 26; 8, 17, 26, 5]
C_BA := B*A → [66, 78, 90; 78, 94, 110; 90, 110, 130]  # Умножение не коммутативно
# Умножение коммутативно
AB := A*B → [14, 32, 50, 8; 32, 77, 122, 17; 50, 122, 194, 26; 8, 17, 26, 5]
AB*C → [648, 252, 356, 460; 1566, 594, 842, 1090; 2484, 936, 1328, 1720; 342, 138, 194, 250]
BC := B*C → [84, 26, 38, 50; 102, 38, 54, 70; 120, 50, 70, 90]
A*BC → [648, 252, 356, 460; 1566, 594, 842, 1090; 2484, 936, 1328, 1720; 342, 138, 194, 250]
V_row := [2, 3, 4]
M := [1, 2, 0; 2, 1, 1; -1, 1, -2]
V_row*M → [4, 11, -5]
V_col := [2; 3; 4]
M*V_col → [8; 11; -7]
