# Translation
M_translation := [1, 0, 0, -2; 0, 1, 0, 0; 0, 0, 1, -15; 0, 0, 0, 1]
v_0 := [1; 1; 1; 1]
M_translation*v_0 → [-1; 1; -14; 1]
# Rotation
v_1 := [1; 1; 1; 1]
Θ := 45*π/180 float → 0.785398163397
M_rot_z := [cos(Θ), -sin(Θ), 0, 0; sin(Θ), cos(Θ), 0, 0; 0, 0, 1, 0; 0, 0, 0, 1]
M_rot_z*v_1 → [-(0.599999980959*10^-20); 1.41421356237; 1.0; 1.0]
M_translation*(M_rot_z*v_1) → [-2; 1.41421356237; -14.0; 1.0]
M_rot_z*(M_translation*v_1) → [-1.41421356237; -(0.599999980959*10^-20); -14.0; 1.0]
M_rot_x := [1, 0, 0, 0; 0, cos(Θ), -sin(Θ), 0; 0, sin(Θ), cos(Θ), 0; 0, 0, 0, 1]
M_rot_x*v_1 → [1.0; -(0.599999980959*10^-20); 1.41421356237; 1.0]
M_rot_y := [cos(Θ), 0, sin(Θ), 0; 0, 1, 0, 0; -sin(Θ), 0, cos(Θ), 0; 0, 0, 0, 1]
M_rot_y*v_1 → [1.41421356237; 1.0; -(0.599999980959*10^-20); 1.0]
