w := 800
h := 600
r := w/h float → 1.33333333333
left := -5
right := 5
top := (right - left)/(2*r) → 3.75
bottom := -top → -3.75
v_0 := [0.061247; -0.82946; -3.55654; 1]
v_1 := [1.841; -1.07368; -3.6282; 1]
v_2 := [0.552495; 1.37945; -7.08899; 1]
f(x) := A*x + B
f(left) := A*left + B == -1
B := -1 - A*left  # error: These units are not compatible.
f(right) := A*right + B == A*right - 1 - A*left == 1
A := 2/(right - left)
A := 2/(right - left)
B := -1 - 2*left/(right - left)
B := -((right + left)/(right - left))
g(y) := C*y + D
g(bottom) := C*bottom + D == -1
D := -1 - C*bottom  # error: These units are not compatible.
g(top) := C*top + D == C*top - 1 - C*bottom == 1
C := 2/(top - bottom)
C := 2/(top - bottom)
D := -1 - 2*bottom/(top - bottom)
D := -((top + bottom)/(top - bottom))
M_proj := [A, 0, 0, B; 0, C, 0, D; 0, 0, E, F; 0, 0, 0, 1]
n := 0.1
f := 10
j(z) := E*z + F
j(n) := E*n + F == 0
F := -E*n
j(f) := E*f + F == E*f - E*n == 1
E := 1/(f - n)
E := 1/(f - n)
F := -n/(f - n)
# [plot: E*z + F vs z]
# Итоговая матрица ортографической проекции
M_proj := [A, 0, 0, B; 0, C, 0, D; 0, 0, -E, F; 0, 0, 0, 1] float → [
    0.2, 0.0, 0.0, 0.0;
    0.0, 0.266666666667, 0.0, 0.0;
    0.0, 0.0, -0.10101010101, -0.010101010101;
    0.0, 0.0, 0.0, 1.0
]
v_0 → [0.061247; -0.82946; -3.55654; 1]
v_1 → [1.841; -1.07368; -3.6282; 1]
v_2 → [0.552495; 1.37945; -7.08899; 1]
v_0_clip := M_proj*v_0 → [0.0122494; -0.221189333333; 0.349145454545; 1.0]
v_0_ndc := v_0_clip/v_0_clip[3] → [0.0122494; -0.221189333333; 0.349145454545; 1.0]
v_1_clip := M_proj*v_1 → [0.3682; -0.286314666667; 0.356383838384; 1.0]
v_1_ndc := v_1_clip/v_1_clip[3] → [0.3682; -0.286314666667; 0.356383838384; 1.0]
v_2_clip := M_proj*v_2 → [0.110499; 0.367853333333; 0.705958585859; 1.0]
v_2_ndc := v_2_clip/v_2_clip[3] → [0.110499; 0.367853333333; 0.705958585859; 1.0]
# Переводим вершины в экранное пространство (построение матрицы см. в /docs/persp_proj.mcdx)
B := (w - 1)/2
A := B
D := (h - 1)/2
C := -(h - 1)/2
M_viewport := [A, 0, 0, B; 0, C, 0, D; 0, 0, 1, 0; 0, 0, 0, 1]
v_0_screen := M_viewport*v_0_ndc → [404.3936353; 365.746205333; 0.349145454545; 1.0]
v_1_screen := M_viewport*v_1_ndc → [546.5959; 385.251242667; 0.356383838384; 1.0]
v_2_screen := M_viewport*v_2_ndc → [443.6443505; 189.327926667; 0.705958585859; 1.0]
