w := 800
h := 600
r := w/h float → 1.33333333333
# Для удобства мы выбираем такую проективную плоскость, в которой при заданном вертикальном FOV полувысота проективного окна будет равна 1 (высота=2). Эта плоскость будет находиться на расстоянии d от начала координат (в пространстве камеры).
