w := 800
h := 600
r := w/h float → 1.33333333333
# Для удобства мы выбираем такую проективную плоскость, в которой при заданном вертикальном FOV полувысота проективного окна будет равна 1 (высота=2). Эта плоскость будет находиться на расстоянии d от начала координат (в пространстве камеры).
proj_win_h_half := 1
proj_win_w_half := r → 1.33333333333
fov_v := 45*(π/180) float → 0.785398163397
d := 1/d == tan(fov_v/2) solve, d → 2.41421356237
half_tan_fov_h := proj_win_w_half/d == half_tan_fov_h solve, half_tan_fov_h → 0.552284749831
fov_h := 2*atan(half_tan_fov_h) → 1.00919128997
v_x := -1
v_y := 1.14459086751
v_z := -4
x_p := x_p/d == v_x/(-v_z) solve, x_p → -0.603553390593
v_x*1/(-z*tan(fov_v/2)) → 2.41421356237/z
y_p := y_p/d == y/(-v_z) solve, y_p → 0.603553390593*y
v_y*1/(-z*tan(fov_v/2)) → -2.76328679571/z
v_0 := [-1; 1.14459086751; -4; 1]
v_1 := [2; 0.5; -8; 1]
v_2 := [-0.0558036062813; -0.719095903424; -3.46616790626; 1]
M_proj_0 := [1, 0, 0, 0; 0, 1, 0, 0; 0, 0, 1, 0; 0, 0, 0, 1]
M_proj_0*v_0 → [-1.0; 1.14459086751; -4.0; 1.0]
# Делим на r, чтобы все точки по X внутри проективного окна привести к [-1,1]
# Перспективное деление
M_proj_1 := [1/(r*tan(fov_v/2)), 0, 0, 0; 0, 1/tan(fov_v/2), 0, 0; 0, 0, 1, 0; 0, 0, -1, 0]
tmp := M_proj_1*v_0 → [-1.81066017178; 2.76328679571; -4.0; 4.0]
tmp/tmp[3] → [-0.452665042945; 0.690821698927; -1.0; 1.0]
# Но мы также хотим, чтобы все значения Z между ближней и дальней плоскостями отсечения мапились в [0,1].
n := 0.1
f := 10
# Мы можем привести Z к [0,1] сразу после умножения на матрицу проекции
(z - n)/(f - n) == z/(f - n) - n/(f - n)
# Тогда матрица проекции будет такой
[1/(r*tan(fov_v/2)), 0, 0, 0; 0, 1/tan(fov_v/2), 0, 0; 0, 0, A, B; 0, 0, -1, 0]
# Где A=1/(f-n), B=-n/(f-n)
# То есть, функция преобразования координаты Z будет линейной.
# При этом понятно, что при перспективном делении Z больше не требует никаких преобразований.
g(z) := -z/(f - n) - n/(f - n)
g(-n) → 0.0
g(-f) → 1.0  # Добавили к аргументу z минус, поскольку входные значения лежат на отрицательной полуоси
# [plot: g(z) vs z]
# Если же мы хотим получить нормализацию только после перспективного деления (а именно это нам и нужно, чтобы результирующий z можно было линейно интерполировать при реализации Z-буфера), тогда функция g(z) принимает вид
g(z) := (z*A + B)/z == A + B/z  # error: This variable is undefined. Check that the label is set correctly.
# В свою очередь, A и B в функции g(z)должны быть такими, чтобы
(-n*A + B)/n == 0
(-f*A + B)/f == 1
-A - B/n == 0
-A - B/f == 1
# Тогда из первого условия следует, что
A == -B/n
# А из второго с учетом первого следует, что
-B/n - B/f == 1
-B/n*f/f - B/f*n/n == 1
-B*((f - n)/nf) == 1
B == -nf/(f - n)
# Тогда
A == f/(f - n)
# И финальный вид функции преобразования Z выглядит так (делим потом не на z, а на w, который является положительным значением z
g(z) := f/(f - n) - n*f/(-z*(f - n))
g(-n) → 0.827180612553*10^-24
g(-f) → 1.0
# [plot: g(z) vs z]
# Итоговая матрица перспективной проекции
n := 0.1
f := 10
A := f/(f - n)
B := -n*f/(f - n)
M_proj := [1/(r*tan(fov_v/2)), 0, 0, 0; 0, 1/tan(fov_v/2), 0, 0; 0, 0, -A, B; 0, 0, -1, 0]
v_0 → [-1; 1.14459086751; -4; 1]
v_1 → [2; 0.5; -8; 1]
v_2 → [-0.0558036062813; -0.719095903424; -3.46616790626; 1]
v_0_clip := M_proj*v_0 → [-1.81066017178; 2.76328679571; 3.93939393939; 4.0]
v_0_ndc := v_0_clip/v_0_clip[3] → [-0.452665042945; 0.690821698927; 0.984848484848; 1.0]
v_1_clip := M_proj*v_1 → [3.62132034356; 1.20710678119; 7.9797979798; 8.0]
v_1_ndc := v_1_clip/v_1_clip[3] → [0.452665042945; 0.150888347648; 0.997474747475; 1.0]
v_2_clip := M_proj*v_2 → [-0.101041367335; -1.73605108269; 3.40016960228; 3.46616790626]
v_2_ndc := v_2_clip/v_2_clip[3] → [-0.0291507422802; -0.500856025918; 0.980959288251; 1.0]
# Переводим вершины в экранное пространство
f(x) == A*x + B
g(y) == C*y + D
f(-1) == 0
f(1) == w - 1
g(-1) == h - 1
g(1) == 0
f(-1) == -A + B == 0
g(-1) == -C + D == h - 1
A == B
C == D - (h - 1)
f(1) == A + B == 2*B == w - 1
g(1) == C + D == D - (h - 1) + D == 2*D - (h - 1) == 0
B := (w - 1)/2
A := B
D := (h - 1)/2
C := -(h - 1)/2
M_viewport := [A, 0, 0, B; 0, C, 0, D; 0, 0, 1, 0; 0, 0, 0, 1]
