A := [-2.86692083764; -0.883609025916; 0]
x := A[0] → -2.86692083764
y := A[1] → -0.883609025916
r := sqrt(x^2 + y^2) → 3
α := acos(x/r) → 2.84262235172
α*180/π → 162.870263503
β := 33.1902454017*π/180 → 0.579279061805
# альфа, вычисленная через atan2
γ :=
    if y < 0
        β - α
    else
        α + β
    → -2.26334328991
atan2(x, y) + β → -2.26334328991
γ*180/π → -129.680018101
x' := cos(γ)*r → -1.91549835192
y' := sin(γ)*r → -2.30886683544
