o := [-4.8598; -6.7863; 4.8399]
p := [-1.6678; -5.2685; 6.5105]
p - o → [3.192; 1.5178; 1.6706]
i := [-4.934; -6.7387; 5.8399] - o → [-0.0742; 0.0476; 1.0]
(p - o)*i → 1.50600088
j := [-4.0134; -7.3292; 4.9285] - o → [0.8464; -0.5429; 0.0886]
(p - o)*j → 2.02571034
k := [-4.3161; -5.9386; 4.8399] - o → [0.5437; 0.8477; 0.0]
(p - o)*k → 3.02212946
