A := [-2.43188386075; 1.75668462958; 0; 1]
T := [2.24017391178; 2.807020326; -0.477337272644]
M_t := [1, 0, 0, T[0]; 0, 1, 0, T[1]; 0, 0, 1, T[2]; 0, 0, 0, 1]
β := 69.6459229602*π/180 → 1.21555066625
γ := 46.929099511*π/180 → 0.819067301462
δ := 76.4891318311*π/180 → 1.33498719244
M_rot_x := [1, 0, 0, 0; 0, cos(γ), -sin(γ), 0; 0, sin(γ), cos(γ), 0; 0, 0, 0, 1]
M_rot_y := [cos(δ), 0, sin(δ), 0; 0, 1, 0, 0; -sin(δ), 0, cos(δ), 0; 0, 0, 0, 1]
M_rot_z := [cos(β), -sin(β), 0, 0; sin(β), cos(β), 0, 0; 0, 0, 1, 0; 0, 0, 0, 1]
# Мы в rotation показали, что повороты можно скомбинировать перемножив матрицы поворотов и только затем умножив вектор на результирующую матрицу. Эти выводы справедливы в общем случае для матриц любых размерностей, а не только 3x3.
#
# Здесь же мы расширили все структуры до 4 компонент и ввели матрицу переноса на вектор.
#
# Из выводов, полученных для rotation понятно, что последовательное произведение вектора и матриц трансформации эквивалентно произведению вектора и комбинированной матрицы трансформаций, полученной предварительным перемножением всех матриц трансформаций.
#
# Главное, расширить матрицы и сам вектор до 4 компонент так, чтобы последовательное произведение вектора на эти матрицы действительно давало желаемую трансформацию. Если это так, то произведение комбинированной матрицы на вектор также даст желаемую трансформацию.
# Тестовые пример 1. Поворот и перенос. (визуализацию см. в translation.ggb)
# NOTE: В сущности происходит сохранение матрицы поворота и встраивание в неё вектора переноса без изменений.
M_t → [1, 0, 0, 2.24017391178; 0, 1, 0, 2.807020326; 0, 0, 1, -0.477337272644; 0, 0, 0, 1]
M_rot_z → [
    0.347820697496, -0.937561071287, 0, 0;
    0.937561071287, 0.347820697496, 0, 0;
    0, 0, 1, 0;
    0, 0, 0, 1
]
M_5 := M_t*M_rot_z → [
    0.347820697496, -0.937561071287, 0.0, 2.24017391178;
    0.937561071287, 0.347820697496, 0.0, 2.807020326;
    0.0, 0.0, 1.0, -0.477337272644;
    0.0, 0.0, 0.0, 1.0
]
A_5 := M_5*A → [-0.252684752117; 1.13799196141; -0.477337272644; 1.0]
A_5 == M_t*M_rot_z*A → 1
# Тестовый пример 2. Перенос и поворот.
# NOTE: По сути, происходит поворот вектора переноса вокруг z и встраивание его в матрицу поворота. Затем происходит обычный поворот + смещение на уже повёрнутый вектор.
M_rot_z → [
    0.347820697496, -0.937561071287, 0, 0;
    0.937561071287, 0.347820697496, 0, 0;
    0, 0, 1, 0;
    0, 0, 0, 1
]
M_t → [1, 0, 0, 2.24017391178; 0, 1, 0, 2.807020326; 0, 0, 1, -0.477337272644; 0, 0, 0, 1]
M_7 := M_rot_z*M_t → [
    0.347820697496, -0.937561071287, 0.0, -1.85257413146;
    0.937561071287, 0.347820697496, 0.0, 3.07663962028;
    0.0, 0.0, 1.0, -0.477337272644;
    0.0, 0.0, 0.0, 1.0
]
A_7 := M_7*A → [-4.34543279537; 1.40761125569; -0.477337272644; 1.0]
A_7 == M_rot_z*M_t*A → 1
# Наконец, скомбинируем все трансформации вместе и умножим на вектор.
M_transform := M_t*M_rot_y*M_rot_x*M_rot_z → [
    0.747204175819, 0.0280123337492, 0.664003937336, 2.24017391178;
    0.640263126782, 0.237527745294, -0.730509205075, 2.807020326;
    -0.178182625761, 0.97097676562, 0.159546458762, -0.477337272644;
    0.0, 0.0, 0.0, 1.0
]
A_4 := M_transform*A → [0.472268972061; 1.66723610061; 1.66168213906; 1.0]
|A_4 - M_t*M_rot_y*M_rot_x*M_rot_z*A| → 0.159113670817*10^-21
