A := [-2.43188386075; 1.75668462958; 0]
x := A[0] → -2.43188386075
z := A[2] → 0
y := A[1] → 1.75668462958
r := sqrt(x^2 + y^2) → 3
α := if x < 0
    if y == 0
        atan(y/x) + π
    else
        atan(y/x) + π*y/|y|
else if x == 0
    y/|y|*π/2
else
    atan(y/x)
→ 2.51602004284 = 2.51602
α*180/π → 144.157329625
atan2(x, y) float → 2.51602004284
atan2(x, y)*180/π float → 144.157329625
|r*cos(α) - x| → 0.12441057471*10^-15  # Угол альфа нужно вычислить так, чтобы через него можно было однозначно выразить исходные значения x, y
|r*sin(α) - y| → 0.17221745836*10^-15
β := 69.6459229602*π/180 → 1.21555066625
x' := r*cos(α + β) → -2.4928586639
y' := r*sin(α + β) → -1.66902836459
cos(α + β) == cos(α)*cos(β) - sin(α)*sin(β) → 1
sin(α + β) == cos(α)*sin(β) + sin(α)*cos(β) → 1
|x' - (x*cos(β) - y*sin(β))| → 0.118172292859*10^-15
|y' - (x*sin(β) + y*cos(β))| → 0.176586641245*10^-15
# Наконец, пакуем в матрицу:
M_rot_z := [cos(β), -sin(β), 0; sin(β), cos(β), 0; 0, 0, 1]
A' := M_rot_z*A → [-2.4928586639; -1.66902836459; 0.0]
|A' - [x'; y'; z]| → 0.212475442547*10^-15
γ := 46.929099511*π/180 → 0.819067301462
M_rot_x := [1, 0, 0; 0, cos(γ), -sin(γ); 0, sin(γ), cos(γ)]
A'' := M_rot_x*A' → [-2.4928586639; -1.1397842254; -1.21924058387]
δ := 76.4891318311*π/180 → 1.33498719244
M_rot_y := [cos(δ), 0, sin(δ); 0, 1, 0; -sin(δ), 0, cos(δ)]
A''' := M_rot_y*A'' → [-1.76790493972; -1.1397842254; 2.1390194117]
# Еще раз, все матрицы поворота:
M_rot_x := [1, 0, 0; 0, cos(γ), -sin(γ); 0, sin(γ), cos(γ)]
M_rot_y := [cos(δ), 0, sin(δ); 0, 1, 0; -sin(δ), 0, cos(δ)]
M_rot_z := [cos(β), -sin(β), 0; sin(β), cos(β), 0; 0, 0, 1]
# Покажем теперь, что можно скомбинировать все повороты умножением матриц
M_rot_y*M_rot_x*M_rot_z*A → [-1.76790493972; -1.1397842254; 2.1390194117]
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[a_1, a_2, a_3; a_4, a_5, a_6; a_7, a_8, a_9]*[b_1, b_2, b_3; b_4, b_5, b_6; b_7, b_8, b_9]*[c_1; c_2; c_3] → [
    c_3*(a_3*b_9 + a_2*b_6 + a_1*b_3) + c_2*(a_3*b_8 + a_2*b_5 + a_1*b_2) + c_1*(a_3*b_7 + a_2*b_4 + a_1*b_1);
    c_3*(a_6*b_9 + a_5*b_6 + a_4*b_3) + c_2*(a_6*b_8 + a_5*b_5 + a_4*b_2) + c_1*(a_6*b_7 + a_5*b_4 + a_4*b_1);
    c_3*(a_9*b_9 + a_8*b_6 + a_7*b_3) + c_2*(a_9*b_8 + a_8*b_5 + a_7*b_2) + c_1*(a_9*b_7 + a_8*b_4 + a_7*b_1)
]
