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α := 116.36*π/180 → 2.03086511762
β := 129.43*π/180 → 2.25897965086
# [plot: cos(x), sin(x) vs x]
sin(β) → 0.772401123468
cos(α + π/2) → -0.896021955849
sin(α) → 0.896021955849
sin(β)*cos(α + π/2) == -sin(β)*sin(α) → 1
cos(α + β) == cos(β)*cos(α) - sin(β)*sin(α) → 1
# Почти те же рассуждения применимы для вывода синуса суммы:
sin(β)*sin(α + π/2) + cos(β)*sin(α) == sin(α + β) → 1
sin(α + π/2) == cos(α) → 1
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sin(α + β) == sin(β)*cos(α) + sin(α)*cos(β) → 1
