cube := [
    -1, -1, 1, 1, -1, -1, 1, 1;
    -1, -1, -1, -1, 1, 1, 1, 1;
    1, -1, -1, 1, 1, -1, -1, 1;
    1, 1, 1, 1, 1, 1, 1, 1
]
S_x := [2, 0, 0, 0; 0, 1, 0, 0; 0, 0, 1, 0; 0, 0, 0, 1]
S_y := [1, 0, 0, 0; 0, 0.5, 0, 0; 0, 0, 1, 0; 0, 0, 0, 1]
S_z := [1, 0, 0, 0; 0, 1, 0, 0; 0, 0, 1.5, 0; 0, 0, 0, 1]
S_x*S_y*S_z*cube → [
    -2.0, -2.0, 2.0, 2.0, -2.0, -2.0, 2.0, 2.0;
    -0.5, -0.5, -0.5, -0.5, 0.5, 0.5, 0.5, 0.5;
    1.5, -1.5, -1.5, 1.5, 1.5, -1.5, -1.5, 1.5;
    1.0, 1.0, 1.0, 1.0, 1.0, 1.0, 1.0, 1.0
]
