w := 800
h := 600
r := w/h float → 1.33333333333
proj_win_h_half := 1
proj_win_w_half := r → 1.33333333333
fov_v := 45*(π/180) float → 0.785398163397
d := 1/d == tan(fov_v/2) solve, d → 2.41421356237
half_tan_fov_h := proj_win_w_half/d == half_tan_fov_h solve, half_tan_fov_h → 0.552284749831
fov_h := 2*atan(half_tan_fov_h) → 1.00919128997
tri_0_v_0 := [0.642925599644; 0.450736360074; -3.06213539473; 1]
tri_0_v_1 := [0; 0.5; -4; 1]
tri_0_v_2 := [-0.00897005986261; -0.0684990327651; -6.56713032024; 1]
tri_1_v_0 := [0.267436004194; 0.669953638904; -3.68403787432; 1]
tri_1_v_1 := [-0.137532566936; -0.172375880283; -3.72243758385; 1]
tri_1_v_2 := [0.425852348506; 0.022890396816; -5.04979942087; 1]
# Итоговая матрица перспективной проекции
n := 0.1
f := 10
A := f/(f - n)
B := -n*f/(f - n)
M_proj := [1/(r*tan(fov_v/2)), 0, 0, 0; 0, 1/tan(fov_v/2), 0, 0; 0, 0, -A, B; 0, 0, -1, 0]
tri_0_v_0_clip := M_proj*tri_0_v_0 → [1.16411977669; 1.08817383354; 2.99205595428; 3.06213539473]
tri_0_v_0_ndc := tri_0_v_0_clip/tri_0_v_0_clip[3] → [0.38016600399; 0.355364375924; 0.977114192737; 1.0]
tri_0_v_1_clip := M_proj*tri_0_v_1 → [0.0; 1.20710678119; 3.93939393939; 4.0]
tri_0_v_1_ndc := tri_0_v_1_clip/tri_0_v_1_clip[3] → [0.0; 0.301776695297; 0.984848484848; 1.0]
tri_0_v_2_clip := M_proj*tri_0_v_2 → [-0.0162417301317; -0.165371293911; 6.53245486893; 6.56713032024]
tri_0_v_2_ndc := tri_0_v_2_clip/tri_0_v_2_clip[3] → [-0.00247318529399; -0.0251816677676; 0.994719847236; 1.0]
tri_1_v_0_clip := M_proj*tri_1_v_0 → [0.484235721294; 1.6174111612; 3.62024027709; 3.68403787432]
tri_1_v_0_ndc := tri_1_v_0_clip/tri_1_v_0_clip[3] → [0.13144156977; 0.439032175124; 0.982682697788; 1.0]
tri_1_v_1_clip := M_proj*tri_1_v_1 → [-0.249024741273; -0.416152188005; 3.65902786248; 3.72243758385]
tri_1_v_1_ndc := tri_1_v_1_clip/tri_1_v_1_clip[3] → [-0.0668982986722; -0.11179561205; 0.982965538052; 1.0]
tri_1_v_2_clip := M_proj*tri_1_v_2 → [0.771073886498; 0.0552623064414; 4.99979739482; 5.04979942087]
tri_1_v_2_ndc := tri_1_v_2_clip/tri_1_v_2_clip[3] → [0.152693963113; 0.0109434656381; 0.990098215417; 1.0]
# Переводим вершины в экранное пространство
