M'_z := A'_z + (M'_x - A'_x)*(B'_z - A'_z)/(B'_x - A'_x) → (B'_z - A'_z)*(M'_x - A'_x)/(B'_x - A'_x) + A'_z
# Интерполированное значение z до точки M', где M' - это проекция M.
# Заменяем все проекции на оригинальное точки в мировом пространстве
M'_z := 1/A_z + (d*M_x/M_z - d*A_x/A_z)*(1/B_z - 1/A_z)/(d*B_x/B_z - d*A_x/A_z) → (-A_x*d/A_z + M_x*d/M_z)*(1/A_z - 1/B_z)/(A_x*d/A_z - B_x*d/B_z) + 1/A_z
# где d - расстояние до проективной плоскости (в данном случае - до проективной линии
# Определим Mz в мировом пространстве
M_z := A_z + (M_x - A_x)*(B_z - A_z)/(B_x - A_x) → (B_z - A_z)*(M_x - A_x)/(B_x - A_x) + A_z  # Уже видно, что M'z и Mz довольно тесно связаны
