f(z) := 1/z
A_z := 3.917298251
B_z := 4.66158674512
M_z := 4.25715593851
M_inv_z := 1/M_z → 0.234898607061
# [plot: f(z) vs z]
# [plot: 1/z vs z]
# Понятно, что, интерполируя линейно обратное значение Z между проекциями A' и B' до произвольной точки C', мы получаем обратное значение Z некоторой точки P, лежащей на отрезке в мировом пространстве между точками A и B.
# Но не вполне очевидно, что C' и есть проекция точки P.
#
# Чтобы обоснование было строгим, нужно показать, что интерполируя обратный z до точки M, мы получаем обратный z именно той точки, лежащей на линии в мировом пространстве, которая проецируется в M.
#
# То есть, нужно взять некую точку M' (проекция). Выразить интерполированное обратное значение Z для этой точки.
# Затем, нужно выразить точку M в мировом пространстве, которая проецируется в M', далее выразить её значение Z и взять 1/Z и сравнить с интерполированным значением точки M' и показать, что они равны.
#
# Можно немного проще. Выразить любую точку M в мировом пространстве, выразить её проекцию M'. Далее, выразить интерполированное значение 1/z от точки A' до M'. Затем выразить значение z точки M в мировом пространстве и выразить его обратное значение 1/Mz и показать, что оно равно интерполированному значению в точке M'.
#
# NOTE: Конечно, соображения выше относятся к упрощенному рассмотрению проекции отрезка в плоскости XZ. Для более строгого доказательства нужно обобщение на трёхмерный случай, где точка в мировом пространстве будет принадлежать не отрезку а треугольнику (возможно и в этом случае мы сможем в итоге перейти к двумерному случаю).
