w := 800
h := 600
r := w/h float → 1.33333333333
proj_win_h_half := 1
proj_win_w_half := r → 1.33333333333
fov_v := 45*(π/180) float → 0.785398163397
d := 1/d == tan(fov_v/2) solve, d → 2.41421356237
half_tan_fov_h := proj_win_w_half/d == half_tan_fov_h solve, half_tan_fov_h → 0.552284749831
fov_h := 2*atan(half_tan_fov_h) → 1.00919128997
tri_0_v_0 := [1.84099609596; -1.07367617213; -3.62819609386; 1]
tri_0_v_1 := [0.061246794009; -0.829460317812; -3.55653877662; 1]
tri_0_v_2 := [0.55249536045; 1.37945536681; -7.08898651514; 1]
tri_1_v_0 := [1.58093484801; 0.59661945498; -3.80230865636; 1]
tri_1_v_1 := [-0.861227769264; 0.373579181289; -6.32224533664; 1]
tri_1_v_2 := [1.13159033714; -1.40078774547; -3.98578011766; 1]
# Итоговая матрица перспективной проекции
n := 0.1
f := 10
A := f/(f - n)
B := -n*f/(f - n)
M_proj := [1/(r*tan(fov_v/2)), 0, 0, 0; 0, 1/tan(fov_v/2), 0, 0; 0, 0, -A, B; 0, 0, -1, 0]
tri_0_v_0_clip := M_proj*tri_0_v_0 → [3.33341830736; -2.59208357635; 3.56383443824; 3.62819609386]
tri_0_v_0_ndc := tri_0_v_0_clip/tri_0_v_0_clip[3] → [0.918753623324; -0.714427640979; 0.982260700923; 1.0]
tri_0_v_1_clip := M_proj*tri_0_v_1 → [0.110897130561; -2.00249434871; 3.49145330972; 3.55653877662]
tri_0_v_1_ndc := tri_0_v_1_clip/tri_0_v_1_clip[3] → [0.0311811954056; -0.56304583599; 0.981699773012; 1.0]
tri_0_v_2_clip := M_proj*tri_0_v_2 → [1.00038134426; 3.33029985524; 7.05958233852; 7.08898651514]
tri_0_v_2_ndc := tri_0_v_2_clip/tri_0_v_2_clip[3] → [0.141117681931; 0.469785045877; 0.995852132522; 1.0]
tri_1_v_0_clip := M_proj*tri_1_v_0 → [2.86253576347; 1.44036677979; 3.73970571349; 3.80230865636]
tri_1_v_0_ndc := tri_1_v_0_clip/tri_1_v_0_clip[3] → [0.752841502933; 0.378813744481; 0.983535544186; 1.0]
tri_1_v_1_clip := M_proj*tri_1_v_1 → [-1.55939082064; 0.901899926088; 6.28509629963; 6.32224533664]
tri_1_v_1_ndc := tri_1_v_1_clip/tri_1_v_1_clip[3] → [-0.246651424867; 0.142655002782; 0.994124075384; 1.0]
tri_1_v_2_clip := M_proj*tri_1_v_2 → [2.04892555423; -3.38180077312; 3.92503042188; 3.98578011766]
tri_1_v_2_ndc := tri_1_v_2_clip/tri_1_v_2_clip[3] → [0.514058852656; -0.84846646661; 0.984758392589; 1.0]
# Переводим вершины в экранное пространство (построение матрицы см. в /docs/persp_proj.mcdx)
B := (w - 1)/2
A := B
D := (h - 1)/2
C := -(h - 1)/2
M_viewport := [A, 0, 0, B; 0, C, 0, D; 0, 0, 1, 0; 0, 0, 0, 1]
tri_0_v_0_screen := M_viewport*tri_0_v_0_ndc → [766.542072518; 513.471078473; 0.982260700923; 1.0]
tri_0_v_1_screen := M_viewport*tri_0_v_1_ndc → [411.956887565; 468.132227879; 0.981699773012; 1.0]
tri_0_v_2_screen := M_viewport*tri_0_v_2_ndc → [455.876513932; 158.79937876; 0.995852132522; 1.0]
tri_1_v_0_screen := M_viewport*tri_1_v_0_ndc → [700.260180422; 186.045283528; 0.983535544186; 1.0]
tri_1_v_1_screen := M_viewport*tri_1_v_1_ndc → [300.962755766; 256.774826667; 0.994124075384; 1.0]
tri_1_v_2_screen := M_viewport*tri_1_v_2_ndc → [604.866511636; 553.61570675; 0.984758392589; 1.0]
# Точки треугольников в мировом пространстве, которые проецируются в одну точку экранного пространства.
M_0 := [0.896160041363; 0.196674274684; -5.35040624274; 1]
M_1 := [0.768746779898; 0.168711734929; -4.58970204027; 1]
# Проецируем точки на экран
M_0_clip := M_proj*M_0 → [1.62264129444; 0.474813701313; 5.30344064923; 5.35040624274]
M_1_clip := M_proj*M_1 → [1.39193917655; 0.407306158597; 4.53505256593; 4.58970204027]
M_0_ndc := M_0_clip/M_0_clip[3] → [0.303274409609; 0.0887434859657; 0.991222050929; 1.0]
M_1_ndc := M_1_clip/M_1_clip[3] → [0.303274409609; 0.0887434859657; 0.988093023499; 1.0]
M_0_screen := M_viewport*M_0_ndc → [520.658126639; 272.921325953; 0.991222050929; 1.0]
M_1_screen := M_viewport*M_1_ndc → [520.658126639; 272.921325953; 0.988093023499; 1.0]
M_0_z_ndc := M_0_screen[2] → 0.991222050929
M_1_z_ndc := M_1_screen[2] → 0.988093023499
# Интерполируем z-атрибут точки проекции первого треугольника вдоль боковых рёбер.
tri_0_v_1_z := tri_0_v_1_screen[2]
tri_0_v_1_x := tri_0_v_1_screen[0]
tri_0_v_1_y := tri_0_v_1_screen[1]
tri_0_v_2_z := tri_0_v_2_screen[2]
tri_0_v_2_x := tri_0_v_2_screen[0]
tri_0_v_2_y := tri_0_v_2_screen[1]
tri_0_v_0_z := tri_0_v_0_screen[2]
tri_0_v_0_x := tri_0_v_0_screen[0]
tri_0_v_0_y := tri_0_v_0_screen[1]
tri_0_z_slope_left := (tri_0_v_1_z - tri_0_v_2_z)/(tri_0_v_1_y - tri_0_v_2_y)
tri_0_x_slope_left := (tri_0_v_1_x - tri_0_v_2_x)/(tri_0_v_1_y - tri_0_v_2_y)
tri_0_z_slope_right := (tri_0_v_0_z - tri_0_v_2_z)/(tri_0_v_0_y - tri_0_v_2_y)
tri_0_x_slope_right := (tri_0_v_0_x - tri_0_v_2_x)/(tri_0_v_0_y - tri_0_v_2_y)
M_0_screen_y := M_0_screen[1]
M_0_screen_x := M_0_screen[0]
tri_0_M_0_screen_offset := M_0_screen_y - tri_0_v_2_y → 114.121947194
tri_0_scan_line_start_z := tri_0_v_2_z + tri_0_M_0_screen_offset*tri_0_z_slope_left → 0.990630912632
tri_0_scan_line_end_z := tri_0_v_2_z + tri_0_M_0_screen_offset*tri_0_z_slope_right → 0.991478846916
tri_0_scan_line_start_x := tri_0_v_2_x + tri_0_M_0_screen_offset*tri_0_x_slope_left → 439.67327753
tri_0_scan_line_end_x := tri_0_v_2_x + tri_0_M_0_screen_offset*tri_0_x_slope_right → 555.83870009
# Интерполируем z-атрибут точки проекции первого треугольника вдоль скан-линии, на которой лежит точка проекции (на самом деле это виртуальная скан-линия без перехода к целочисленной y-координате).
tri_0_z_slope_horiz := (tri_0_scan_line_end_z - tri_0_scan_line_start_z)/(tri_0_scan_line_end_x - tri_0_scan_line_start_x)
M_0_screen_z_interpolated := tri_0_scan_line_start_z + (M_0_screen_x - tri_0_scan_line_start_x)*tri_0_z_slope_horiz → 0.991222050929
|M_0_screen_z_interpolated - M_0_z_ndc| → 0.376454571168*10^-14
# То есть, линейно интерполируя z_ndc в экранном пространстве для произвольного фрагмента, мы получаем истинное значение z_ndc точки в мировом пространстве, которая проецируется в этот фрагмент. А мы знаем, что преобразование z->z_ndc сохраняет порядок, поэтому можем использовать интерполированные z-значения для реализации z-буфера.
#
# Это следствие того, что z_ndc является линейной функцией экранных координат. В противном случае, мы бы не получили истинное значение z_ndc (как в случае линейной интерполяции сырых z-значений мирового пространства).
