w := 800
h := 600
r := w/h float → 1.33333333333
proj_win_h_half := 1
proj_win_w_half := r → 1.33333333333
fov_v := 45*(π/180) float → 0.785398163397
d := 1/d == tan(fov_v/2) solve, d → 2.41421356237
half_tan_fov_h := proj_win_w_half/d == half_tan_fov_h solve, half_tan_fov_h → 0.552284749831
fov_h := 2*atan(half_tan_fov_h) → 1.00919128997
tri_0_v_0 := [0.128585119929; 0.0901472720147; -3.06213539473; 1]
tri_0_v_1 := [0; 0.1; -4; 1]
tri_0_v_2 := [-0.00179401197252; -0.013699806553; -6.56713032024; 1]
tri_1_v_0 := [0.0534872008388; 0.133990727781; -3.68403787432; 1]
tri_1_v_1 := [-0.0275065133871; -0.0344751760566; -3.72243758385; 1]
tri_1_v_2 := [0.0851704697012; 0.00457807936321; -5.04979942087; 1]
# Итоговая матрица перспективной проекции
n := 0.1
f := 10
A := f/(f - n)
B := -n*f/(f - n)
M_proj := [1/(r*tan(fov_v/2)), 0, 0, 0; 0, 1/tan(fov_v/2), 0, 0; 0, 0, -A, B; 0, 0, -1, 0]
tri_0_v_0_clip := M_proj*tri_0_v_0 → [0.232823955339; 0.217634766709; 2.99205595428; 3.06213539473]
tri_0_v_0_ndc := tri_0_v_0_clip/tri_0_v_0_clip[3] → [0.0760332007981; 0.0710728751848; 0.977114192737; 1.0]
tri_0_v_1_clip := M_proj*tri_0_v_1 → [0.0; 0.241421356237; 3.93939393939; 4.0]
tri_0_v_1_ndc := tri_0_v_1_clip/tri_0_v_1_clip[3] → [0.0; 0.0603553390593; 0.984848484848; 1.0]
tri_0_v_2_clip := M_proj*tri_0_v_2 → [-0.00324834602634; -0.0330742587822; 6.53245486893; 6.56713032024]
tri_0_v_2_ndc := tri_0_v_2_clip/tri_0_v_2_clip[3] → [-0.000494637058797; -0.00503633355352; 0.994719847236; 1.0]
tri_1_v_0_clip := M_proj*tri_1_v_0 → [0.0968471442588; 0.323482232241; 3.62024027709; 3.68403787432]
tri_1_v_0_ndc := tri_1_v_0_clip/tri_1_v_0_clip[3] → [0.026288313954; 0.0878064350249; 0.982682697788; 1.0]
tri_1_v_1_clip := M_proj*tri_1_v_1 → [-0.0498049482546; -0.083230437601; 3.65902786248; 3.72243758385]
tri_1_v_1_ndc := tri_1_v_1_clip/tri_1_v_1_clip[3] → [-0.0133796597344; -0.02235912241; 0.982965538052; 1.0]
tri_1_v_2_clip := M_proj*tri_1_v_2 → [0.1542147773; 0.0110524612883; 4.99979739482; 5.04979942087]
tri_1_v_2_ndc := tri_1_v_2_clip/tri_1_v_2_clip[3] → [0.0305387926226; 0.00218869312761; 0.990098215417; 1.0]
# Переводим вершины в экранное пространство (построение матрицы см. в /docs/persp_proj.mcdx)
B := (w - 1)/2
A := B
D := (h - 1)/2
C := -(h - 1)/2
M_viewport := [A, 0, 0, B; 0, C, 0, D; 0, 0, 1, 0; 0, 0, 0, 1]
tri_0_v_0_screen := M_viewport*tri_0_v_0_ndc → [429.875263719; 278.213673882; 0.977114192737; 1.0]
tri_0_v_1_screen := M_viewport*tri_0_v_1_ndc → [399.5; 281.423575952; 0.984848484848; 1.0]
tri_0_v_2_screen := M_viewport*tri_0_v_2_ndc → [399.302392495; 301.008381899; 0.994719847236; 1.0]
tri_1_v_0_screen := M_viewport*tri_1_v_0_ndc → [410.002181425; 273.20197271; 0.982682697788; 1.0]
tri_1_v_1_screen := M_viewport*tri_1_v_1_ndc → [394.154825936; 306.196557162; 0.982965538052; 1.0]
tri_1_v_2_screen := M_viewport*tri_1_v_2_ndc → [411.700247653; 298.844486408; 0.990098215417; 1.0]
# При линейной интерполяции нелинейно нормализованного z до точки пересечения, мы получаем точно такой же z, который даст нелинейная нормализация z точки пересечения в мировом пространстве
intersec := [0.119328624711; 0.0827744664735; -3.31097865894; 1]
intersec_clip := M_proj*intersec → [0.216063588117; 0.199835239578; 3.24341278681; 3.31097865894]
intersec_ndc := intersec_clip/intersec_clip[3] → [0.0652567142148; 0.0603553390593; 0.979593383379; 1.0]
intersec_screen := M_viewport*intersec_ndc → [425.570057329; 281.423575952; 0.979593383379; 1.0]
# Фрагмент красного треугольника в экранном пространстве с линейно интерполированным атрибутом z
tri_0_frag_screen := [407; 281; 0.98312402962]
tri_1_frag_screen := [407; 281; 0.983131159211]
# Переводим координаты фрагмента из экранных обратно в пространство проективной плоскости, полувысота которой равна единице (это плоскость, на которую мы проецируемся из мировых координат)
A := 2*r/(w - 1)
B := -r
x_proj_plane(x_screen) := x_screen*A + B
x_proj_plane(0) → -1.33333333333
x_proj_plane(w - 1) → 1.33333333333
x_proj_plane((w - 1)/2) → -(0.299999667362*10^-20)
C := -2/(h - 1)
D := 1
y_proj_plane(y_screen) := y_screen*C + D
y_proj_plane(0) → 1
y_proj_plane(h - 1) → -1
y_proj_plane((h - 1)/2) → 0
# Истинный атрибут z фрагмента нас пока не интересует
tri_0_frag_proj_plane := [x_proj_plane(tri_0_frag_screen[0]); y_proj_plane(tri_0_frag_screen[1])] float → [0.0250312891114; 0.0617696160267]
# Точки красного и синего треугольника, которые проецируются в конечном итоге в определенный выше фрагмент в экранном пространстве
tri_0_vert_frag := [0.0388220977454; 0.0958011415398; -3.74430715412; 1]
tri_1_vert_frag := [0.0388323605267; 0.0958264669658; -3.74529697713; 1]
# Теперь проецируем эти вершины из мировых координат на экран
tri_1_vert_frag_clip := M_proj*tri_1_vert_frag → [0.0703122085819; 0.231345556183; 3.68211815872; 3.74529697713]
tri_0_vert_frag_clip := M_proj*tri_0_vert_frag → [0.0702936261725; 0.231284415196; 3.6811183375; 3.74430715412]
tri_1_vert_frag_ndc := tri_1_vert_frag_clip/tri_1_vert_frag_clip[3] → [0.0187734668335; 0.0617696160267; 0.983131159211; 1.0]
tri_0_vert_frag_ndc := tri_0_vert_frag_clip/tri_0_vert_frag_clip[3] → [0.0187734668335; 0.0617696160267; 0.98312402962; 1.0]
tri_0_vert_frag_screen := M_viewport*tri_0_vert_frag_ndc → [407; 281; 0.98312402962; 1.0]
tri_1_vert_frag_screen := M_viewport*tri_1_vert_frag_ndc → [407; 281; 0.983131159211; 1.0]
# Z-координаты нелинейно нормализованные после проецирования пробных вершин треугольников на экран
tri_0_z_proj := tri_0_vert_frag_screen[2] → 0.98312402962
tri_1_z_proj := tri_1_vert_frag_screen[2] → 0.983131159211
# Z-координаты линейно интерполированные фрагментов треугольников в экранном пространстве
tri_0_z_interpolated := tri_0_frag_screen[2] → 0.98312402962
tri_1_z_interpolated := tri_1_frag_screen[2] → 0.983131159211
# Как видим, разница между интерполированным z и спроецированным близка к нулю
tri_0_z_proj - tri_0_z_interpolated → 0.261694404*10^-14
tri_1_z_proj - tri_1_z_interpolated → 0.7747697*10^-16
# Мы взяли фрагменты двух треугольников по одинаковым экранным координатам (x,y) вместе с линейно интерполированными атрибутами z.
#
# Затем мы нашли (в GeoGebra) точки на треугольниках в мировом пространстве, которые соответствуют этим фрагментам в экранных координатах.
#
# Затем мы спроецировали эти точки в экранное пространство обычным образом (через матрицу проекции, перспективное деление и матрицу вьюпорта.
#
# Мы увидели, что после линейной интерполяции z-атрибута для фрагмента каждого треугольника мы получаем такое же значение, какое даёт нам нелинейная нормализация при проецировании и перспективном делении точек в мировом пространстве, соответствующих данным фрагментам.
#
# При этом нелинейная нормализация Z обладает тем свойством, что сохраняет отношение порядка между истинными координатами Z в мировом пространстве.
#
# А поскольку линейная интерполяция Z-атрибута (как мы убедились выше) даёт то же самое множество нелинейно нормализованных значений Z, что и проецирование точек мирового пространства, соответствующих фрагментам внутри треугольника в экранном пространстве, то отношение порядка сохраняется и в этом случае.
#
# Таким образом, мы можем безопасно выполнять линейную интерполяцию нелинейно нормализованных Z-атрибутов вершин в экранном пространстве при реализации Z-буфера, поскольку, если истинные Z-координаты точек мирового пространства, соответствующие двум фрагментам, находятся в некотором отношении, то линейно интерполированные z-атрибуты этих фрагментов также сохранят это отношение.
#
# NOTE: Конечно, было бы неплохо дать более общее и строгое обоснование. А также рассмотреть, почему мы не можем безопасно интерполировать истинные Z-координаты, или линейно нормализованные Z-координаты (скорее всего, мы можем привести такой пример, когда после линейной интерполяции истинных или линейно нормализованных z-атрибутов, мы получим ситуацию, когда фрагмент, соответствующий более отдаленной точке в мировом пространстве, получит z-координату, которая будет меньше, чем интерполированная z-координата фрагмента, соответствующего более ближней точке в мировом пространстве (то есть, получим своп фрагментов и артефакт при растеризации похожий на z-файтинг, хотя по совсем другой причине, а не по причине близости интерполированных z-значений).
#
# UPD: В папке docs/actual_z_linear_interpolation лежат файлы GeoGebra и ODS где приводится пример, который показывает, почему мы не можем линейно интерполировать истинные значения Z (как раз получаем ситуация обозначенную в NOTE).
