x := 0.7
y := 0.78
x/y → 0.897435897436
w := 800
h := 600
r := w/h
x_ndc := x/r → 0.525
x' := x_ndc*w → 420.0
y' := y*h → 468.0
x'/y' → 0.897435897436
x*w/(r*y*h) == x/y*1/r*w/h
# Отношение экранных координат x'/y' будет равно отношению координат на проективной плоскости только тогда, когда r будет равен соотношению сторон экрана.
h := 1
Cam_x := 0
r := 800/600 float → 1.33333333333
fov_vert := 85*π/180 float → 1.4835298642
Cam_y := 0
Cam_z := 0
d := 1/tan(fov_vert/2) → 1.09130850107
J_x := 0.0584169775
J_y := 0.613365948
J_z := Cam_z - 1.33763874 → -1.33763874
J_y/(J_z + d) == J_y'/d
J_y' := J_y*d/(J_z + d) → -2.7173743517
J_x/(J_z + d) == J_x'/d
J_x' := J_x*d/(J_z + d) → -0.258802753691
